f(x) := (5*cos(x) + x^3)*((5*sin(x) + x^3) + cos(x))
x0 := 4
h0 := 10^-3
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f1t(x) := d/dx(f(x)) → (5*cos(x) + x^3)*(5*cos(x) - sin(x) + 3*x^2) - (5*sin(x) - 3*x^2)*(cos(x) + 5*sin(x) + x^3)
f1(x, h) := (f(x + h) - f(x - h))/(2*h)
ε1(h) := |(f1(x0, h) - f1t(x0))/f1t(x0)|
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x1min := 3.52e-6
ε1(x1min) = 7.28889e-12
f12(x, h) := (f(x) - f(x - h))/h
ε12(h) := |(f12(x0, h) - f1t(x0))/f1t(x0)|
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x12min := 1.84e-8
ε12(x12min) = 1.23117e-9
f2t(x) := d^2/dx^2(f(x)) → (6*x - 5*cos(x))*(cos(x) + 5*sin(x) + x^3) - 2*(5*sin(x) - 3*x^2)*(5*cos(x) - sin(x) + 3*x^2) - (5*cos(x) + x^3)*(cos(x) - 6*x + 5*sin(x))
f2(x, h) := (f(x + h) - 2*f(x) + f(x - h))/h^2
ε2(h) := |(f2(x0, h) - f2t(x0))/f2t(x0)|
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x2min := 0.000246
ε2(x2min) = 3.42963e-10
f3(x, h) := (f(x + 2*h) - 2*f(x + h) + 2*f(x - h) - f(x - 2*h))/(2*h^3)
f3t(x) := d^3/dx^3(f(x)) → (5*cos(x) + x^3)*(sin(x) - 5*cos(x) + 6) + (5*sin(x) + 6)*(cos(x) + 5*sin(x) + x^3) + 3*(5*sin(x) - 3*x^2)*(cos(x) - 6*x + 5*sin(x)) + 3*(6*x - 5*cos(x))*(5*cos(x) - sin(x) + 3*x^2)
ε3(h) := |(f3(x0, h) - f3t(x0))/f3t(x0)|
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x3min := 0.001475
ε3(x3min) = 9.3818e-9
f4(x, h) := (f(x + 2*h) - 4*f(x + h) + 6*f(x) - 4*f(x - h) + f(x - 2*h))/h^4
f4t(x) := d^4/dx^4(f(x)) → (cos(x) + 5*sin(x))*(5*cos(x) + x^3) + 5*cos(x)*(cos(x) + 5*sin(x) + x^3) - 4*(5*sin(x) - 3*x^2)*(sin(x) - 5*cos(x) + 6) + 4*(5*sin(x) + 6)*(5*cos(x) - sin(x) + 3*x^2) - 6*(6*x - 5*cos(x))*(cos(x) - 6*x + 5*sin(x))
ε4(h) := |(f4(x0, h) - f4t(x0))/f4t(x0)|
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x4min := 0.0042
ε4(x4min) = 1.65717e-7
