f(x) := 1/(x^2 + 2)*e^(2*cos(x))
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a := -1
b := 1
n1 := 100
n2 := 200
n3 := 400
h1 := (b - a)/n1 → 1/50
h2 := (b - a)/n2 → 1/100
h3 := (b - a)/n3 → 1/200
i := 0 .. n1
j := 0 .. n2
k := 0 .. n3
t0 := a
tn := b
t1[i] := t0 + i*h1 → i/50 - 1
t2[j] := t0 + j*h2 → j/100 - 1
t3[k] := t0 + k*h3 → k/200 - 1
# Метод Рунге-Кутты | Индивидуальный метод Вариант 1
# Метод Эйлера
xrk3[0] := a
xi1[0] := a
xrk1[0] := a
xrk2[0] := a
prk := 4
xi2[0] := a
xe1[0] := a
xi3[0] := a
pi := 1
pe := 1
k1(h, xr) := f(xr)
xe2[0] := a
xe3[0] := a
k2(h, xr) := f(xr + h/2*f(xr))
xi1[i + 1] := xi1[i] + h1/2*(f(xi1[i]) + f(xi1[i] + h1*f(xi1[i])))
xe1[i + 1] := xe1[i] + h1*f(xe1[i])
k3(h, xr) := f(xr + h/2*f(xr + h/2*f(xr)))
xe2[j + 1] := xe2[j] + h2*f(xe2[j])
xi2[j + 1] := xi2[j] + h2/2*(f(xi2[j]) + f(xi2[j] + h2*f(xi2[j])))
xe3[k + 1] := xe3[k] + h3*f(xe3[k])
k4(h, xr) := f(xr + h*f(xr + h/2*f(xr + h/2*f(xr))))
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xi3[k + 1] := xi3[k] + h3/2*(f(xi3[k]) + f(xi3[k] + h3*f(xi3[k])))
xrk1[i + 1] := xrk1[i] + h1/6*(f(xrk1[i]) + 2*f(xrk1[i] + h1/2*f(xrk1[i])) + 2*f(xrk1[i] + h1/2*f(xrk1[i] + h1/2*f(xrk1[i]))) + f(xrk1[i] + h1*f(xrk1[i] + h1/2*f(xrk1[i] + h1/2*f(xrk1[i])))))
xrk2[j + 1] := xrk2[j] + h2/6*(f(xrk2[j]) + 2*f(xrk2[j] + h2/2*f(xrk2[j])) + 2*f(xrk2[j] + h2/2*f(xrk2[j] + h2/2*f(xrk2[j]))) + f(xrk2[j] + h2*f(xrk2[j] + h2/2*f(xrk2[j] + h2/2*f(xrk2[j])))))
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xrk3[k + 1] := xrk3[k] + h3/6*(f(xrk3[k]) + 2*f(xrk3[k] + h3/2*f(xrk3[k])) + 2*f(xrk3[k] + h3/2*f(xrk3[k] + h3/2*f(xrk3[k]))) + f(xrk3[k] + h3*f(xrk3[k] + h3/2*f(xrk3[k] + h3/2*f(xrk3[k])))))
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Погрешности
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εe12 := |xe1[n1] - xe2[n2]|/(2^pe - 1)*2^pe
εe23 := |xe2[n1] - xe3[n2]|/(2^pe - 1)*2^pe
εrk12 := |xrk1[n1] - xrk2[n2]|/(2^prk - 1)*2^prk
εi12 := |xi1[n1] - xi2[n2]|/(2^pi - 1)*2^pi
εi23 := |xi2[n1] - xi3[n2]|/(2^pi - 1)*2^pi
εrk23 := |xrk2[n1] - xrk3[n2]|/(2^prk - 1)*2^prk
εe23 = 0.000640923
εe12 = 0.00357104
εrk12 = 5.29943e-8
εrk23 = 1.08171e-8
εi23 = 0.000226085
εi12 = 0.000300651
