# Вариант функции: 24
# Вариант метода: 11
f(x) := 1/(x^2 + 2)*e^(2*cos(x))
K1 := h*f[m]  # error: Эта переменная не определена.
K2 := h*f(x[m] + 1/4*K1)  # error: Эта переменная не определена.
K3 := h*f(x[m] - 189/800*K1 + 729/800*K2)  # error: Эта переменная не определена.
x[m + 1] := x[m] + 241/891*K1 + 650/891*K3  # error: Эта переменная не определена.
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t0 := 2
tn := 2.5
n1 := 100
n2 := 200
n3 := 400
h1 := (tn - t0)/n1
h2 := (tn - t0)/n2
i := 0 .. n1
h3 := (tn - t0)/n3
j := 0 .. n2
k := 0 .. n3
t1[i] := t0 + i*h1
t2[j] := t0 + j*h2
t3[k] := t0 + k*h3
# Метод Эйлера
xe1[0] := t0
xe2[0] := t0
xe3[0] := t0
xe1[i + 1] := xe1[i] + h1*f(xe1[i])
xe2[j + 1] := xe2[j] + h2*f(xe2[j])
xe3[k + 1] := xe3[k] + h3*f(xe3[k])
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h1*f(x1[i] - 189/800*(h1*f(x1[i])) + 729/800*(h1*f(x1[i] + 1/4*(h1*f(x)))))
h1*f(x1[i] + 1/4*(h1*f(x1[i])))
x[m + 1] := x[m] + 241/891*K1 + 650/891*K3  # error: Эта переменная не определена.
x1[0] := t0
x2[0] := t0
x3[0] := t0
K2(h, x) := h*f(x + 1/4*(h*f(x)))
K1(h, x) := (h*f(x))
K3(h, x) := h*f(x - 189/800*(h*f(x)) + 729/800*(h*f(x + 1/4*(h*f(x)))))
# Индивидуальный метод
x1[i + 1] := x1[i] + 533/2106*K1(h1, x1[i]) + 800/1053*K3(h1, x1[i])
x2[j + 1] := x2[j] + 533/2106*K1(h2, x2[j]) + 800/1053*K3(h2, x2[j])
x3[k + 1] := x3[k] + 533/2106*K1(h3, x3[k]) + 800/1053*K3(h3, x3[k])
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# Метод Рунге-Кутты
prk := 4
xrk1[0] := t0
xrk2[0] := t0
xrk3[0] := t0
k1(l) := f(l)
k2(l, h) := f(l + h/2*k1(l))
k3(l, h) := f(l + h/2*k2(l, h))
k4(l, h) := f(l + h*k3(l, h))
kh(l, h) := h*(k1(l) + 2*k2(l, h) + 2*k3(l, h) + k4(l, h))/6
xrk1[i + 1] := xrk1[i] + kh(xrk1[i], h1)
xrk2[j + 1] := xrk2[j] + kh(xrk2[j], h2)
xrk3[k + 1] := xrk3[k] + kh(xrk3[k], h3)
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p := 4
pe := 1
prk := 4
εe12 := |xe1[n1] - xe2[n2]|*2^pe/(2^pe - 1)
εe12 = 1.42748e-5
εe23 := |xe2[n1] - xe3[n2]|*2^pe/(2^pe - 1)
εe23 = 3.81154e-6
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εrk12 := |xrk1[n1] - xrk2[n2]|*2^prk/(2^prk - 1)
εrk12 = 1.89478e-15
εrk23 := |xrk2[n1] - xrk3[n2]|*2^prk/(2^pe - 1)
εrk23 = 0
ε12 := |x1[n1] - x2[n2]|*2^p/(2^p - 1)
ε12 = 1.24887e-9
ε23 := |xe2[n1] - xe3[n2]|*2^p/(2^p - 1)
ε23 = 2.03282e-6
