# Интерполирование функций | Бренева Вероника Вариант 1
f(x) := (5*cos(x) + x^3)*((5*sin(x) + x^3) + cos(x))
n1 := 5
a := 2
n2 := 20
b := 7
n3 := 70
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i := 0 .. n1
h1 := (b - a)/n1
j := 0 .. n2
k := 0 .. n3
h2 := (b - a)/n2
h3 := (b - a)/n3
x1[i] := a + i*h1
h1 = 1
h2 = 0.25
x2[j] := a + j*h2
h3 = 0.0714286
x3[k] := a + k*h3
y1[i] := f(x1[i])
y2[j] := f(x2[j])
y3[k] := f(x3[k])
# Полином Лагранжа
fL1(x) := sum(y1[i1]*product(if(j1 == i1, 1, (x - x1[j1])/(x1[i1] - x1[j1])), j1 = 0 .. n1), i1 = 0 .. n1)
fL3(x) := sum(y3[i3]*product(if(j3 == i3, 1, (x - x3[j3])/(x3[i3] - x3[j3])), j3 = 0 .. n3), i3 = 0 .. n3)
fL2(x) := sum(y2[i2]*product(if(j2 == i2, 1, (x - x2[j2])/(x2[i2] - x2[j2])), j2 = 0 .. n2), i2 = 0 .. n2)
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# Узлы Чебышёва
x0 := (a + b)/2
d := (b - a)/2
x0 = 4.5
d = 2.5
xch1[i] := x0 + d*cos(π/2*(2*i + 1)/(n1 + 1))
xch2[j] := x0 + d*cos(π/2*(2*j + 1)/(n2 + 1))
xch3[k] := x0 + d*cos(π/2*(2*k + 1)/(n3 + 1))
ych1[i] := f(xch1[i])
ych2[j] := f(xch2[j])
ych3[k] := f(xch3[k])
fLch1(x) := sum(ych1[i1]*product(if(j1 == i1, 1, (x - xch1[j1])/(xch1[i1] - xch1[j1])), j1 = 0 .. n1), i1 = 0 .. n1)
fLch2(x) := sum(ych2[i2]*product(if(j2 == i2, 1, (x - xch2[j2])/(xch2[i2] - xch2[j2])), j2 = 0 .. n2), i2 = 0 .. n2)
fLch3(x) := sum(ych3[i3]*product(if(j3 == i3, 1, (x - xch3[j3])/(xch3[i3] - xch3[j3])), j3 = 0 .. n3), i3 = 0 .. n3)
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Погрешность
e1(x) := |f(x) - fL1(x)|
ech1(x) := |f(x) - fLch1(x)|
e2(x) := |f(x) - fL2(x)|
ech2(x) := |f(x) - fLch2(x)|
ech3(x) := |f(x) - fLch3(x)|
e3(x) := |f(x) - fL3(x)|
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