Функция
f(x) := (5*cos(x) + x^3)*((5*sin(x) + x^3) + cos(x))
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a := 0
b := 5
n2 := 10
h2 := (b - a)/n2
n3 := 70
h3 := (b - a)/n3
n1 := b - a
h1 := (b - a)/n1
k2 := 0 .. n2
k3 := 0 .. n3
k1 := 0 .. n1
xk2[k2] := a + k2*h2
xk3[k3] := a + k3*h3
xk[k1] := a + k1*h1
yk3[k3] := f(xk3[k3])
yk2[k2] := f(xk2[k2])
yk[k1] := f(xk[k1])
xk[k1] = [0; 1; 2; 3; 4; 5]
yk[k1] = [5; 21.275; 71.8027; 589.08; 3617.33; 15232]
i := 0 .. n1
j := 0 .. n1
i2 := 0 .. n2
j2 := 0 .. n2
i3 := 0 .. n3
j3 := 0 .. n3
# Формула Лагранжа
fL(x) := sum(yk[i]*product(if(i == j, 1, (x - xk[j])/(xk[i] - xk[j])), j = 0 .. n1), i = 0 .. n1)
fL2(x) := sum(yk2[i2]*product(if(i2 == j2, 1, (x - xk2[j2])/(xk2[i2] - xk2[j2])), j2 = 0 .. n2), i2 = 0 .. n2)
fL3(x) := sum(yk3[i3]*product(if(i3 == j3, 1, (x - xk3[j3])/(xk3[i3] - xk3[j3])), j3 = 0 .. n3), i3 = 0 .. n3)
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# все работает, нужно поиграться с масштабом
# Узлы Чебышева
nn4 := 5
i4 := 0 .. nn4
j4 := 0 .. nn4
x0 := (a + b)/2
Δ := (b - a)/2
xx[i4] := x0 + Δ*cos((2*i4 + 1)/(nn4 + 1)*π/2)
yy[i4] := f(xx[i4])
fLch(x) := sum(yy[i4]*product(if(i4 == j4, 1, (x - xx[j4])/(xx[i4] - xx[j4])), j4 = 0 .. nn4), i4 = 0 .. nn4)
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n4 := 70
i4 := 0 .. n4
j4 := 0 .. n4
xx[i4] := x0 + Δ*cos((2*i4 + 1)/(n4 + 1)*π/2)
yy[i4] := f(xx[i4])
fL2ch(x) := sum(yy[i4]*product(if(i4 == j4, 1, (x - xx[j4])/(xx[i4] - xx[j4])), j4 = 0 .. n4), i4 = 0 .. n4)
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nnn4 := 10
i4 := 0 .. nnn4
j4 := 0 .. nnn4
x0 := (a + b)/2
xx[i4] := x0 + Δ*cos((2*i4 + 1)/(nnn4 + 1)*π/2)
yy[i4] := f(xx[i4])
fL3ch(x) := sum(yy[i4]*product(if(i4 == j4, 1, (x - xx[j4])/(xx[i4] - xx[j4])), j4 = 0 .. nnn4), i4 = 0 .. nnn4)
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