f(x) := (5*cos(x) + x)*((5*sin(x) + x) + cos(x))
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a := 0
b := 5
m := 8
n := 2^m
h := (b - a)/n
i := 0 .. n
k := 100
x1[i] := a + i*h
y1[i] := f(x1[i]) + rnd(k) - k/2
st := 10
xx(st) := regress(x1, y1, st)
ff(x, st) := interp(xx(st), x1, y1, x)
Графики
j := 0 .. n
tx[j] := min(x1) + j*(max(x1) - min(x1))/(n + 1)
fp(j, st) := ff(tx[j], st)
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Погрешности
DD[j] := |y1[j] - fp(j, st)|
DDD(n) := sum((y1[k] - fp(k, st))^2, k = 0 .. n)/(n - st)
DDD(n) = 862.303
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sr := mean(DD) = 24.7706
sm := max(DD) = 53.4846
